@DSL ImplicitGenericBehaviour;
@Behaviour RichardsMechanicsDSMMicroMacroBridge_MCC;
@Author OpenGeoSys Community;
@Date 27 / 03 / 2026;
@Description{
    Pressure-coupled RichardsMechanics bridge that keeps the verified
    ModCamClay_semiExpl_constE mechanical and saturation surface, while also
    carrying the dsm_micromacro microstate variables n_l, rho_lR, epsilon_sw, phi_m,
    phi_M, mu_lR, rho_l_hat, phi, n_S, n_L, rho_LR, omega_l,
    delta_epsilon_sw, and sigma_S as persistent dsm_micromacro support state. The
    returned saturation matches either the verified MCC bridge or, when
    explicitly enabled, the dsm_micromacro Tuller law. The returned effective stress
    also includes the dsm_micromacro isotropic swelling correction driven by the
    updated microstate.
}

@Theta 1.0;
@Epsilon 1e-14;
@MaximumNumberOfIterations 200;
@ModellingHypotheses{".+"};
@Algorithm NewtonRaphson;

@Gradient StrainStensor εᵗᵒ;
εᵗᵒ.setGlossaryName("Strain");

@ThermodynamicForce StressStensor σ;
σ.setGlossaryName("Stress");

@Gradient real pᴸᴿ;
pᴸᴿ.setEntryName("LiquidPressure");

@ThermodynamicForce real Sᴸ;
Sᴸ.setEntryName("Saturation");

@StateVariable StrainStensor εᵉˡ;
εᵉˡ.setGlossaryName("ElasticStrain");

@StateVariable real Λₚ;
Λₚ.setGlossaryName("EquivalentPlasticStrain");

@IntegrationVariable strain rpc;

@AuxiliaryStateVariable stress pc;
pc.setEntryName("PreConsolidationPressure");

@AuxiliaryStateVariable real εᵛₚₗ;
εᵛₚₗ.setEntryName("PlasticVolumetricStrain");

@AuxiliaryStateVariable real vʳ;
vʳ.setEntryName("VolumeRatio");

@AuxiliaryStateVariable real n_l;
n_l.setEntryName("n_l");

@AuxiliaryStateVariable real rho_lR;
rho_lR.setEntryName("rho_lR");

@AuxiliaryStateVariable real epsilon_sw;
epsilon_sw.setEntryName("epsilon_sw");

@AuxiliaryStateVariable real phi_m;
phi_m.setEntryName("phi_m");

@AuxiliaryStateVariable real phi_M;
phi_M.setEntryName("phi_M");

@AuxiliaryStateVariable real phi_value;
phi_value.setEntryName("phi");

@AuxiliaryStateVariable real n_S_value;
n_S_value.setEntryName("n_S");

@AuxiliaryStateVariable real n_L_value;
n_L_value.setEntryName("n_L");

@AuxiliaryStateVariable real rho_LR_value;
rho_LR_value.setEntryName("rho_LR");

@AuxiliaryStateVariable real omega_l_value;
omega_l_value.setEntryName("omega_l");

@AuxiliaryStateVariable real mu_lR_value;
mu_lR_value.setEntryName("mu_lR");

@AuxiliaryStateVariable real rho_l_hat_value;
rho_l_hat_value.setEntryName("rho_l_hat");

@AuxiliaryStateVariable real delta_epsilon_sw_value;
delta_epsilon_sw_value.setEntryName("delta_epsilon_sw");

@AuxiliaryStateVariable Stensor sigma_S_value;
sigma_S_value.setEntryName("sigma_S");

@Parameter stress pamb = 1e+3;
@PhysicalBounds pamb in [0:*[;
pamb.setEntryName("AmbientPressure");

@MaterialProperty stress young;
@PhysicalBounds young in [0:*[;
young.setGlossaryName("YoungModulus");

@MaterialProperty real ν;
@PhysicalBounds ν in [-1:0.5];
ν.setGlossaryName("PoissonRatio");

@MaterialProperty real M;
@PhysicalBounds M in [0:*[;
M.setEntryName("CriticalStateLineSlope");

@MaterialProperty real ka;
@PhysicalBounds ka in [0:*[;
ka.setEntryName("SwellingLineSlope");

@MaterialProperty real la;
@PhysicalBounds la in [0:*[;
la.setEntryName("VirginConsolidationLineSlope");

@MaterialProperty stress pc_char;
@PhysicalBounds pc_char in [0:*[;
pc_char.setEntryName("CharacteristicPreConsolidationPressure");

@MaterialProperty real Sᴸʳ;
Sᴸʳ.setEntryName("ResidualLiquidSaturation");

@MaterialProperty real Sᴳʳ;
Sᴳʳ.setEntryName("ResidualGasSaturation");

@MaterialProperty real pᵇ;
pᵇ.setEntryName("BubblePressure");

@MaterialProperty real mⱽᴳ;
mⱽᴳ.setEntryName("VanGenuchtenExponent_m");

@MaterialProperty real macro_saturation_law_mode;
@PhysicalBounds macro_saturation_law_mode in [0:*[;
macro_saturation_law_mode.setEntryName("MacroSaturationLawMode");

@MaterialProperty real microstate_local_solve_mode;
@PhysicalBounds microstate_local_solve_mode in [0:*[;
microstate_local_solve_mode.setEntryName("MicroStateLocalSolveMode");

@MaterialProperty real micro_potential_convention;
@PhysicalBounds micro_potential_convention in [0:*[;
micro_potential_convention.setEntryName("MicroPotentialConvention");

@MaterialProperty real swelling_slope;
swelling_slope.setEntryName("SwellingSlope");

@MaterialProperty real mass_exchange_coefficient;
mass_exchange_coefficient.setEntryName("MassExchangeCoefficient");

@MaterialProperty real macro_viscosity;
macro_viscosity.setEntryName("MacroViscosity");

@MaterialProperty real rho_LR_ref;
rho_LR_ref.setEntryName("ReferenceLiquidDensityMacro");

@MaterialProperty real rho_l0;
rho_l0.setEntryName("ReferenceLiquidDensityMicro");

@MaterialProperty real rho_SR;
rho_SR.setEntryName("ReferenceDensitySolid");

@MaterialProperty real density_a;
density_a.setEntryName("MicroLiquidDensityA");

@MaterialProperty real density_b;
density_b.setEntryName("MicroLiquidDensityB");

@MaterialProperty real hamaker_constant;
hamaker_constant.setEntryName("HamakerConstant");
// A: Hamaker constant [J] for clay-water-clay; literature value
// 2.2e-20 J for montmorillonite-water-montmorillonite (Israelachvili &
// Adams 1978, J. Chem. Soc. Faraday Trans. I, vol. 74, p. 975, Table 2,
// SFA mica proxy; range 1-5e-20 J across DLVO smectite literature).
// DO NOT calibrate A. Only K (vdw_augmentation_prefactor) and lambda
// (vdw_augmentation_decay_length) below are calibrated to Villar.
// Ported from native ProcessLib/RichardsMechanics/ConstitutiveRelations/
// PotentialExchange.h lines 71-94.

@MaterialProperty real specific_surface;
specific_surface.setEntryName("SpecificSurface");

@MaterialProperty real vdw_augmentation_prefactor;
vdw_augmentation_prefactor.setEntryName("VdwAugmentationPrefactor");
// K [J/kg]: lumped exponential augmentation amplitude; calibrated to
// Villar swelling pressure (paper_DSM.tex Tab. msIII_vs_villar:
// K(rho_d=1400)=7654.9, K(1600)=29985.0, K(1800)=118582.6 J/kg).
// Set to 0 to disable augmentation (pure vdW base only).

@MaterialProperty real vdw_augmentation_decay_length;
vdw_augmentation_decay_length.setEntryName("VdwAugmentationDecayLength");
// lambda [m]: characteristic water-film thickness in the augmentation
// exponential exp(-h/lambda); calibrated to Villar (typical 7.5e-7 m).

@MaterialProperty real area_factor_tuller;
area_factor_tuller.setEntryName("AreaFactorTuller");

@MaterialProperty real pore_area_shape_factor_tuller;
pore_area_shape_factor_tuller.setEntryName("PoreAreaShapeFactorTuller");

@MaterialProperty real characteristic_pore_size;
characteristic_pore_size.setEntryName("CharacteristicPoreSize");

@MaterialProperty real surface_tension;
surface_tension.setEntryName("SurfaceTension");

@MaterialProperty real phi0;
phi0.setEntryName("InitialPorosity");

@LocalVariable bool withinElasticRange;
@LocalVariable real M²;
@LocalVariable real pc_min;
@LocalVariable real rpc_min;
@LocalVariable real K;
@LocalVariable StressStensor σ₀;
@LocalVariable StiffnessTensor ∂σ∕∂εᵉˡ;
@LocalVariable real n_l_trial_value;
@LocalVariable real rho_lR_trial_value;
@LocalVariable real epsilon_sw_increment_trial;
@LocalVariable real phi_m_trial_value;
@LocalVariable real phi_M_trial_value;
@LocalVariable real mu_lR_trial_value;
@LocalVariable real rho_l_hat_trial_value;
@LocalVariable real dn_l_dtrace_eps_trial;
@LocalVariable real dn_l_dp_trial;
@LocalVariable bool use_macro_saturation_law;
@LocalVariable bool use_scalar_microstate_storage;
@LocalVariable real micro_potential_sign;
@LocalVariable real tuller_capillary_prefactor;
@LocalVariable real macro_support_saturation_trial;

@TangentOperatorBlocks{∂σ∕∂Δεᵗᵒ, ∂σ∕∂Δpᴸᴿ, ∂Sᴸ∕∂Δεᵗᵒ, ∂Sᴸ∕∂Δpᴸᴿ};

@InitializeLocalVariables
{
    const auto Sₑ = [&](const auto pᶜᵃᵖ) {
        return std::pow(
            std::pow(std::max(pᶜᵃᵖ, 0.0) / pᵇ, 1.0 / (1.0 - mⱽᴳ)) + 1.0, -mⱽᴳ);
    };

    constexpr const auto pressure_tolerance = 1e-12;

    use_macro_saturation_law = macro_saturation_law_mode > 0.5;
    use_scalar_microstate_storage = microstate_local_solve_mode > 0.5;
    tfel::raise_if(area_factor_tuller <= 0.0,
                   "Invalid parameter: AreaFactorTuller must be positive.");
    tfel::raise_if(pore_area_shape_factor_tuller <= 0.0,
                   "Invalid parameter: PoreAreaShapeFactorTuller must be positive.");
    tfel::raise_if(characteristic_pore_size <= 0.0,
                   "Invalid parameter: CharacteristicPoreSize must be positive.");
    tfel::raise_if(surface_tension <= 0.0,
                   "Invalid parameter: SurfaceTension must be positive.");
    tuller_capillary_prefactor =
        4.0 * pore_area_shape_factor_tuller * surface_tension * surface_tension /
        (area_factor_tuller * characteristic_pore_size * characteristic_pore_size);

    const auto macro_saturation_law = [&](const auto p_arg) {
        if (p_arg < -pressure_tolerance)
        {
            const auto capillary_term = tuller_capillary_prefactor / (p_arg * p_arg);
            return 1.0 - std::exp(-capillary_term);
        }
        return 1.0;
    };

    const auto S = use_macro_saturation_law
                       ? macro_saturation_law(pᴸᴿ + Δpᴸᴿ)
                       : Sₑ(-(pᴸᴿ + Δpᴸᴿ)) * (1.0 - Sᴳʳ - Sᴸʳ) + Sᴸʳ;
    Sᴸ = use_macro_saturation_law ? S : std::clamp(S, Sᴸʳ, 1.0 - Sᴳʳ);
    macro_support_saturation_trial = macro_saturation_law(pᴸᴿ + Δpᴸᴿ);

    tfel::raise_if(la < ka, "Invalid parameters: la<ka");
    M² = M * M;

    εᵉˡ = (1.0 + ν) / young * σ - ν / young * trace(σ) * I₂;
    σ₀ = σ;

    rpc = pc / young;
    pc_min = 1e-15 * pc_char;
    rpc_min = pc_min / young;

    K = young / (3.0 * (1.0 - 2.0 * ν));
    ∂σ∕∂εᵉˡ = young / (1.0 + ν) * Stensor4::K() + K * Stensor4::IxI();

    const auto σᵉˡ = σ₀ + ∂σ∕∂εᵉˡ * Δεᵗᵒ;
    const auto sᵉˡ = deviator(σᵉˡ);
    const auto qᵉˡ = sqrt(1.5 * sᵉˡ | sᵉˡ);
    const auto pᵉˡ = -trace(σᵉˡ) / 3.0 + pamb;
    const auto fᵉˡ = qᵉˡ * qᵉˡ + M² * pᵉˡ * (pᵉˡ - pc);
    withinElasticRange = fᵉˡ < 0;

    constexpr const auto pi = 3.14159265358979323846;
    constexpr const auto minimum_n_l = 1e-14;
    constexpr const auto minimum_density_gap = 1e-12;
    constexpr const auto newton_tolerance = 1e-11;
    constexpr const auto max_iterations = 64u;
    const auto hamaker_magnitude = std::abs(hamaker_constant);
    micro_potential_sign =
        (micro_potential_convention > 0.5 ? -1.0 : 1.0) *
        (hamaker_constant >= 0.0 ? 1.0 : -1.0);

    tfel::raise_if(phi0 <= 0.0 || phi0 >= 1.0,
                   "Invalid parameter: InitialPorosity must lie in (0,1).");
    tfel::raise_if(rho_LR_ref <= 0.0 || rho_l0 <= 0.0 || rho_SR <= 0.0,
                   "Invalid density parameter: all reference densities must be positive.");
    tfel::raise_if(macro_viscosity <= 0.0,
                   "Invalid parameter: MacroViscosity must be positive.");
    tfel::raise_if(hamaker_magnitude <= 0.0,
                   "Invalid parameter: HamakerConstant must be non-zero.");
    tfel::raise_if(specific_surface <= 0.0,
                   "Invalid parameter: SpecificSurface must be positive.");
    tfel::raise_if(vdw_augmentation_prefactor < 0.0,
                   "Invalid parameter: VdwAugmentationPrefactor must be >= 0.");
    tfel::raise_if(vdw_augmentation_prefactor > 0.0 &&
                       !(vdw_augmentation_decay_length > 0.0),
                   "Invalid parameter: VdwAugmentationDecayLength must be > 0 "
                   "when VdwAugmentationPrefactor > 0.");

    const auto p = pᴸᴿ + Δpᴸᴿ;
    const auto delta_epsilon_v = trace(Δεᵗᵒ);
    const auto zero_dt = std::abs(dt) < 1e-15;
    constexpr const auto porosity_upper = 1.0 - 1e-12;
    const auto phi_total_from_state =
        std::max(phi_m, 0.0) + std::max(phi_M, 0.0);
    const auto phi_total_prev =
        (std::isfinite(phi_total_from_state) &&
         phi_total_from_state > minimum_n_l)
            ? std::clamp(phi_total_from_state, minimum_n_l, porosity_upper)
            : std::clamp(phi0, minimum_n_l, porosity_upper);
    const auto porosity_denominator = 1.0 + delta_epsilon_v;
    const auto phi_total_trial =
        (std::isfinite(porosity_denominator) &&
         std::abs(porosity_denominator) > 1e-12)
            ? std::clamp((phi_total_prev + delta_epsilon_v) /
                             porosity_denominator,
                         minimum_n_l, porosity_upper)
            : phi_total_prev;
    // [2026-05-27 F2 PHYSICS FIX] active_nS denotes the aggregate SOLID
    // fraction (V_solid/V_aggregate = 1 - n_l) used as the denominator of
    // the gravimetric water content omega_l = n_l*rho_lR/(nS*rho_SR).
    // Previously this MCC bridge used 1 - phi_total (the REV solid
    // fraction), which equals (1-phi_M)*(1-n_l) in the hierarchical
    // split — a state-dependent factor (1-phi_M) off from the standard
    // gravimetric content. The fix mirrors the native (commit 8192021299)
    // and base mfront bridge (commit 340b928856) treatments and makes
    // active_nS a function of the iterate n_l within solve_microstate.
    const auto active_nS_from_nl = [&](const auto n_l_arg) {
        const auto n_l_clamped =
            std::clamp(n_l_arg, minimum_n_l, 1.0 - minimum_n_l);
        return std::max(minimum_n_l, 1.0 - n_l_clamped);
    };
    const auto n_l_upper_bound = std::max(phi_total_trial, minimum_n_l);
    const auto n_l_prev = std::clamp(n_l, minimum_n_l, n_l_upper_bound);
    const auto rho_lR_prev =
        std::max(rho_lR, rho_LR_ref + minimum_density_gap);
    const auto phi_m_from_n_l = [&](const auto n_l_arg) {
        const auto n_l_safe = std::clamp(n_l_arg, minimum_n_l, n_l_upper_bound);
        const auto one_minus_n_l = std::max(1e-12, 1.0 - n_l_safe);
        return std::clamp(((1.0 - phi_total_trial) / one_minus_n_l) * n_l_safe,
                          minimum_n_l, phi_total_trial);
    };
    const auto phi_m_prev = phi_m_from_n_l(n_l_prev);
    const auto previous_mass = phi_m_prev * rho_lR_prev;

    const auto macro_density_from_state = [&](const auto rho_macro_arg) {
        return std::max(rho_macro_arg, rho_LR_ref + minimum_density_gap);
    };

    const auto alpha_M_effective_from_density = [&](const auto /*rho_macro_arg*/) {
        // alpha_eff = MassExchangeCoefficient * rho_LR_ref / FluidViscosity
        // Uses fixed reference density (not dynamic rho_macro) — matches native alpha_M_effective.
        return mass_exchange_coefficient * rho_LR_ref / macro_viscosity;
    };

    const auto mu_macro_from_pressure = [&](const auto p_arg,
                                            const auto rho_macro_arg) {
        const auto rho_macro_safe = macro_density_from_state(rho_macro_arg);
        return p_arg > -pressure_tolerance ? 0.0 : p_arg / rho_macro_safe;
    };

    const auto omega_from_state = [&](const auto n_l_arg,
                                      const auto rho_lR_arg) {
        // F2: nS is the AGGREGATE solid fraction = 1 - n_l_arg (function of
        // the iterate n_l), not the REV solid fraction (1 - phi_total).
        const auto nS_local = active_nS_from_nl(n_l_arg);
        return n_l_arg * rho_lR_arg / (nS_local * rho_SR);
    };

    const auto rho_micro_eos = [&](const auto n_l_arg,
                                   const auto rho_lR_arg) {
        const auto omega =
            std::max(omega_from_state(n_l_arg, rho_lR_arg), minimum_n_l);
        return rho_l0 * std::exp(-density_a * std::pow(omega, density_b)) +
               rho_LR_ref;
    };

    const auto mu_micro_from_state = [&](const auto n_l_arg,
                                         const auto rho_lR_arg) {
        const auto rho_lR_safe =
            std::max(rho_lR_arg, rho_LR_ref + minimum_density_gap);
        const auto n_l_safe = std::max(n_l_arg, minimum_n_l);
        // F2: active_nS = 1 - n_l_arg (aggregate solid fraction).
        const auto nS_local = active_nS_from_nl(n_l_arg);
        // vdW base [J/kg]: nS-form -(A·Sa³·nS³·rho_SR³)/(6π·n_l³·rho_lR).
        // /rho_lR dimensional fix already applied (matches base bridge).
        const auto mu_vdW = (micro_potential_sign * hamaker_magnitude *
                             specific_surface * specific_surface *
                             specific_surface / (6.0 * pi)) *
                            (nS_local * nS_local * nS_local *
                             rho_SR * rho_SR * rho_SR) /
                            (n_l_safe * n_l_safe * n_l_safe * rho_lR_safe);  // J/kg
        // F3: lumped exponential augmentation [J/kg],
        // mu_aug = sign · K · exp(-h/lambda),  h = n_l/(nS·rho_SR·Sa).
        // Same sign convention as vdW; K = 0 disables.
        const auto mu_aug =
            (vdw_augmentation_prefactor > 0.0 &&
             vdw_augmentation_decay_length > 0.0)
                ? micro_potential_sign * vdw_augmentation_prefactor *
                      std::exp(-n_l_safe /
                               (vdw_augmentation_decay_length * nS_local *
                                rho_SR * specific_surface))
                : 0.0;  // J/kg
        return mu_vdW + mu_aug;  // J/kg
    };

    const auto solve_microstate = [&](const auto p_arg,
                                      const auto delta_epsilon_v_arg,
                                      const auto n_l_prev_arg,
                                      const auto rho_lR_prev_arg,
                                      double& n_l_out,
                                      double& rho_lR_out,
                                      double& mu_lR_out,
                                      double& rho_l_hat_out) {
        const auto rho_macro_step =
            macro_density_from_state(rho_lR_prev_arg);

        if (use_scalar_microstate_storage)
        {
            auto n_l_trial =
                std::clamp(n_l_prev_arg, minimum_n_l, n_l_upper_bound);
            const auto rho_scalar = rho_macro_step;

            const auto evaluate_scalar = [&](const auto n_l_arg,
                                             double& residual_arg,
                                             double& mu_lR_arg,
                                             double& rho_l_hat_arg) {
                const auto mu_LR_arg =
                    mu_macro_from_pressure(p_arg, rho_scalar);
                const auto alpha_M_effective =
                    alpha_M_effective_from_density(rho_scalar);
                mu_lR_arg = mu_micro_from_state(n_l_arg, rho_scalar);
                rho_l_hat_arg = alpha_M_effective * (mu_LR_arg - mu_lR_arg);
                residual_arg = n_l_arg - n_l_prev_arg -
                               dt * rho_l_hat_arg / rho_scalar -
                               n_l_arg * delta_epsilon_v_arg;
            };

            const auto assign_scalar_state = [&](const auto n_l_candidate_arg) {
                n_l_out = std::clamp(n_l_candidate_arg, minimum_n_l,
                                     n_l_upper_bound);
                double residual_dummy = 0.0;
                evaluate_scalar(n_l_out, residual_dummy, mu_lR_out,
                                rho_l_hat_out);
                rho_lR_out = rho_scalar;
            };

            const auto solve_scalar_bracketed =
                [&](double& n_l_bracketed_out,
                    double& mu_lR_bracketed_out,
                    double& rho_l_hat_bracketed_out) {
                    constexpr const auto bracket_scan_points = 256u;
                    auto n_l_lo = minimum_n_l;
                    auto n_l_hi = n_l_upper_bound;

                    double residual_lo = 0.0;
                    double residual_hi = 0.0;
                    double mu_lo = 0.0;
                    double mu_hi = 0.0;
                    double rho_hat_lo = 0.0;
                    double rho_hat_hi = 0.0;

                    evaluate_scalar(n_l_lo, residual_lo, mu_lo, rho_hat_lo);
                    evaluate_scalar(n_l_hi, residual_hi, mu_hi, rho_hat_hi);

                    if (residual_lo * residual_hi > 0.0)
                    {
                        const auto log_n_l_min = std::log10(minimum_n_l);
                        const auto log_n_l_max = std::log10(n_l_hi);
                        auto previous_n_l = n_l_lo;
                        auto previous_residual = residual_lo;
                        auto previous_mu = mu_lo;
                        auto previous_rho_hat = rho_hat_lo;
                        auto found_bracket = false;

                        for (unsigned int i = 1; i <= bracket_scan_points; ++i)
                        {
                            const auto log_n_l =
                                log_n_l_min +
                                (log_n_l_max - log_n_l_min) *
                                    (static_cast<double>(i) /
                                     bracket_scan_points);
                            const auto n_l_candidate = std::clamp(
                                std::pow(10.0, log_n_l), minimum_n_l,
                                n_l_upper_bound);

                            double residual_candidate = 0.0;
                            double mu_candidate = 0.0;
                            double rho_hat_candidate = 0.0;
                            evaluate_scalar(n_l_candidate, residual_candidate,
                                            mu_candidate,
                                            rho_hat_candidate);

                            if (previous_residual * residual_candidate <= 0.0)
                            {
                                n_l_lo = previous_n_l;
                                residual_lo = previous_residual;
                                mu_lo = previous_mu;
                                rho_hat_lo = previous_rho_hat;

                                n_l_hi = n_l_candidate;
                                residual_hi = residual_candidate;
                                mu_hi = mu_candidate;
                                rho_hat_hi = rho_hat_candidate;
                                found_bracket = true;
                                break;
                            }

                            previous_n_l = n_l_candidate;
                            previous_residual = residual_candidate;
                            previous_mu = mu_candidate;
                            previous_rho_hat = rho_hat_candidate;
                        }

                        if (!found_bracket)
                        {
                            return false;
                        }
                    }

                    for (unsigned int iteration = 0;
                         iteration < 4 * max_iterations; ++iteration)
                    {
                        const auto n_l_mid = 0.5 * (n_l_lo + n_l_hi);
                        double residual_mid = 0.0;
                        double mu_mid = 0.0;
                        double rho_hat_mid = 0.0;
                        evaluate_scalar(n_l_mid, residual_mid, mu_mid,
                                        rho_hat_mid);

                        if (std::abs(residual_mid) < newton_tolerance ||
                            std::abs(n_l_hi - n_l_lo) <
                                newton_tolerance *
                                    std::max(1.0, std::abs(n_l_mid)))
                        {
                            n_l_bracketed_out = n_l_mid;
                            mu_lR_bracketed_out = mu_mid;
                            rho_l_hat_bracketed_out = rho_hat_mid;
                            return true;
                        }

                        if (residual_lo * residual_mid <= 0.0)
                        {
                            n_l_hi = n_l_mid;
                            residual_hi = residual_mid;
                        }
                        else
                        {
                            n_l_lo = n_l_mid;
                            residual_lo = residual_mid;
                        }
                    }

                    const auto n_l_mid = 0.5 * (n_l_lo + n_l_hi);
                    double residual_mid = 0.0;
                    double mu_mid = 0.0;
                    double rho_hat_mid = 0.0;
                    evaluate_scalar(n_l_mid, residual_mid, mu_mid,
                                    rho_hat_mid);
                    n_l_bracketed_out = n_l_mid;
                    mu_lR_bracketed_out = mu_mid;
                    rho_l_hat_bracketed_out = rho_hat_mid;
                    return true;
                };

            for (unsigned int iteration = 0; iteration < max_iterations;
                 ++iteration)
            {
                double residual = 0.0;
                double mu_trial = 0.0;
                double rho_hat_trial = 0.0;
                evaluate_scalar(n_l_trial, residual, mu_trial, rho_hat_trial);

                if (std::abs(residual) < newton_tolerance)
                {
                    assign_scalar_state(n_l_trial);
                    return;
                }

                const auto dn_scale =
                    std::max(1e-8, std::abs(n_l_trial) * 1e-6);
                double residual_n = 0.0;
                double mu_n = 0.0;
                double rho_hat_n = 0.0;
                evaluate_scalar(
                    std::clamp(n_l_trial + dn_scale, minimum_n_l,
                               n_l_upper_bound),
                    residual_n, mu_n, rho_hat_n);

                const auto scalar_jacobian =
                    (residual_n - residual) / dn_scale;
                if (!(std::isfinite(scalar_jacobian) &&
                      std::abs(scalar_jacobian) > newton_tolerance))
                {
                    break;
                }

                const auto delta_n = -residual / scalar_jacobian;
                auto step_scale = 1.0;
                auto accepted = false;

                for (unsigned int line_search = 0; line_search < 8;
                     ++line_search)
                {
                    const auto n_candidate =
                        std::clamp(n_l_trial + step_scale * delta_n,
                                   minimum_n_l, n_l_upper_bound);
                    double residual_candidate = 0.0;
                    double mu_candidate = 0.0;
                    double rho_hat_candidate = 0.0;
                    evaluate_scalar(n_candidate, residual_candidate,
                                    mu_candidate, rho_hat_candidate);

                    if (std::abs(residual_candidate) <
                        std::abs(residual) * (1.0 - 1e-4 * step_scale))
                    {
                        n_l_trial = n_candidate;
                        accepted = true;
                        break;
                    }

                    step_scale *= 0.5;
                }

                if (!accepted)
                {
                    if (solve_scalar_bracketed(n_l_out, mu_lR_out,
                                               rho_l_hat_out))
                    {
                        assign_scalar_state(n_l_out);
                        return;
                    }

                    // Native-aligned robustness fallback: explicit one-step
                    // update when local Newton/bracketing does not converge.
                    double residual_prev = 0.0;
                    double mu_prev = 0.0;
                    double rho_hat_prev = 0.0;
                    auto const n_l_prev_safe = std::clamp(
                        n_l_prev_arg, minimum_n_l, n_l_upper_bound);
                    evaluate_scalar(n_l_prev_safe, residual_prev, mu_prev,
                                    rho_hat_prev);
                    const auto n_l_explicit =
                        n_l_prev_safe + dt * rho_hat_prev / rho_scalar +
                        n_l_prev_safe * delta_epsilon_v_arg;
                    assign_scalar_state(n_l_explicit);
                    return;
                }
            }

            if (solve_scalar_bracketed(n_l_out, mu_lR_out, rho_l_hat_out))
            {
                assign_scalar_state(n_l_out);
                return;
            }

            // Native-aligned robustness fallback after scalar Newton loop.
            double residual_prev = 0.0;
            double mu_prev = 0.0;
            double rho_hat_prev = 0.0;
            auto const n_l_prev_safe =
                std::clamp(n_l_prev_arg, minimum_n_l, n_l_upper_bound);
            evaluate_scalar(n_l_prev_safe, residual_prev, mu_prev,
                            rho_hat_prev);
            const auto n_l_explicit =
                n_l_prev_safe + dt * rho_hat_prev / rho_scalar +
                n_l_prev_safe * delta_epsilon_v_arg;
            assign_scalar_state(n_l_explicit);
            return;
        }

        auto n_l_trial =
            std::clamp(n_l_prev_arg, minimum_n_l, n_l_upper_bound);
        auto rho_lR_trial =
            std::max(rho_lR_prev_arg, rho_LR_ref + minimum_density_gap);
        auto converged = false;

        const auto evaluate = [&](const auto n_l_arg,
                                  const auto rho_lR_arg,
                                  double& residual_1,
                                  double& residual_2,
                                  double& mu_lR_arg,
                                  double& rho_l_hat_arg) {
            const auto mu_LR_arg =
                mu_macro_from_pressure(p_arg, rho_macro_step);
            const auto alpha_M_effective =
                alpha_M_effective_from_density(rho_macro_step);
            mu_lR_arg = mu_micro_from_state(n_l_arg, rho_lR_arg);
            rho_l_hat_arg =
                alpha_M_effective * (mu_LR_arg - mu_lR_arg);
            const auto phi_m_arg = phi_m_from_n_l(n_l_arg);
            residual_1 =
                phi_m_arg * rho_lR_arg - previous_mass - dt * rho_l_hat_arg -
                phi_m_arg * rho_lR_arg * delta_epsilon_v_arg;
            residual_2 = rho_lR_arg - rho_micro_eos(n_l_arg, rho_lR_arg);
        };

        const auto solve_rho_for_n_l = [&](const auto n_l_arg,
                                           const auto rho_initial_guess,
                                           double& rho_lR_out_arg) {
            auto rho_lR_trial_local =
                std::max(rho_initial_guess, rho_LR_ref + minimum_density_gap);

            for (unsigned int iteration = 0; iteration < 4 * max_iterations;
                 ++iteration)
            {
                const auto rho_candidate =
                    rho_micro_eos(n_l_arg, rho_lR_trial_local);
                const auto rho_change =
                    std::abs(rho_candidate - rho_lR_trial_local);
                rho_lR_trial_local =
                    std::max(rho_candidate, rho_LR_ref + minimum_density_gap);

                if (rho_change < newton_tolerance *
                                     std::max(1.0, std::abs(rho_lR_trial_local)))
                {
                    rho_lR_out_arg = rho_lR_trial_local;
                    return true;
                }
            }

            rho_lR_out_arg = rho_lR_trial_local;
            return false;
        };

        const auto evaluate_reduced = [&](const auto n_l_arg,
                                          const auto rho_initial_guess,
                                          double& residual_1,
                                          double& rho_lR_arg,
                                          double& mu_lR_arg,
                                          double& rho_l_hat_arg) {
            const auto rho_converged = solve_rho_for_n_l(
                n_l_arg, rho_initial_guess, rho_lR_arg);
            const auto mu_LR_arg =
                mu_macro_from_pressure(p_arg, rho_macro_step);
            const auto alpha_M_effective =
                alpha_M_effective_from_density(rho_macro_step);
            mu_lR_arg = mu_micro_from_state(n_l_arg, rho_lR_arg);
            rho_l_hat_arg =
                alpha_M_effective * (mu_LR_arg - mu_lR_arg);
            const auto phi_m_arg = phi_m_from_n_l(n_l_arg);
            residual_1 =
                phi_m_arg * rho_lR_arg - previous_mass - dt * rho_l_hat_arg -
                phi_m_arg * rho_lR_arg * delta_epsilon_v_arg;
            return rho_converged;
        };

        const auto assign_coupled_state = [&](const auto n_l_candidate_arg,
                                              const auto rho_guess_arg) {
            n_l_out = std::clamp(n_l_candidate_arg, minimum_n_l, n_l_upper_bound);
            auto rho_resolved = std::max(rho_guess_arg, rho_LR_ref + minimum_density_gap);
            if (!solve_rho_for_n_l(n_l_out, rho_resolved, rho_resolved))
            {
                rho_resolved = std::max(rho_micro_eos(n_l_out, rho_resolved),
                                        rho_LR_ref + minimum_density_gap);
            }
            rho_lR_out = rho_resolved;
            const auto mu_LR_arg = mu_macro_from_pressure(p_arg, rho_macro_step);
            const auto alpha_M_effective =
                alpha_M_effective_from_density(rho_macro_step);
            mu_lR_out = mu_micro_from_state(n_l_out, rho_lR_out);
            rho_l_hat_out = alpha_M_effective * (mu_LR_arg - mu_lR_out);
        };

        const auto fallback_coupled_state = [&]() {
            const auto n_l_prev_safe =
                std::clamp(n_l_prev_arg, minimum_n_l, n_l_upper_bound);
            double residual_prev = 0.0;
            double rho_prev =
                std::max(rho_lR_prev_arg, rho_LR_ref + minimum_density_gap);
            double mu_prev = 0.0;
            double rho_hat_prev = 0.0;

            const auto reduced_ok =
                evaluate_reduced(n_l_prev_safe, rho_prev, residual_prev, rho_prev,
                                 mu_prev, rho_hat_prev);
            (void)residual_prev;
            if (!reduced_ok)
            {
                const auto mu_LR_arg =
                    mu_macro_from_pressure(p_arg, rho_macro_step);
                const auto alpha_M_effective =
                    alpha_M_effective_from_density(rho_macro_step);
                mu_prev = mu_micro_from_state(n_l_prev_safe, rho_prev);
                rho_hat_prev = alpha_M_effective * (mu_LR_arg - mu_prev);
            }

            const auto n_l_explicit =
                n_l_prev_safe +
                dt * rho_hat_prev /
                    std::max(rho_prev, rho_LR_ref + minimum_density_gap) +
                n_l_prev_safe * delta_epsilon_v_arg;
            assign_coupled_state(n_l_explicit, rho_prev);
        };

        const auto solve_microstate_bracketed =
            [&](double& n_l_bracketed_out,
                double& rho_lR_bracketed_out,
                double& mu_lR_bracketed_out,
                double& rho_l_hat_bracketed_out) {
                constexpr const auto bracket_scan_points = 256u;
                auto n_l_lo = minimum_n_l;
                auto n_l_hi = std::max(phi0, std::max(n_l_prev_arg, minimum_n_l * 10.0));

                double residual_lo = 0.0;
                double residual_hi = 0.0;
                double rho_lo = 0.0;
                double rho_hi = 0.0;
                double mu_lo = 0.0;
                double mu_hi = 0.0;
                double rho_hat_lo = 0.0;
                double rho_hat_hi = 0.0;

                auto bracket_ok =
                    evaluate_reduced(n_l_lo, rho_lR_prev_arg, residual_lo,
                                     rho_lo, mu_lo, rho_hat_lo) &&
                    evaluate_reduced(n_l_hi, rho_lR_prev_arg, residual_hi,
                                     rho_hi, mu_hi, rho_hat_hi);

                if (!bracket_ok)
                {
                    return false;
                }

                if (residual_lo * residual_hi > 0.0)
                {
                    const auto log_n_l_min = std::log10(minimum_n_l);
                    const auto log_n_l_max = std::log10(n_l_hi);
                    auto previous_n_l = n_l_lo;
                    auto previous_residual = residual_lo;
                    auto previous_rho = rho_lo;
                    auto previous_mu = mu_lo;
                    auto previous_rho_hat = rho_hat_lo;
                    auto found_bracket = false;

                    for (unsigned int i = 1; i <= bracket_scan_points; ++i)
                    {
                        const auto log_n_l =
                            log_n_l_min +
                            (log_n_l_max - log_n_l_min) *
                                (static_cast<double>(i) / bracket_scan_points);
                        const auto n_l_candidate = std::clamp(
                            std::pow(10.0, log_n_l), minimum_n_l,
                            n_l_upper_bound);

                        double residual_candidate = 0.0;
                        double rho_candidate = 0.0;
                        double mu_candidate = 0.0;
                        double rho_hat_candidate = 0.0;
                        if (!evaluate_reduced(n_l_candidate, rho_lR_prev_arg,
                                              residual_candidate, rho_candidate,
                                              mu_candidate,
                                              rho_hat_candidate))
                        {
                            return false;
                        }

                        if (previous_residual * residual_candidate <= 0.0)
                        {
                            n_l_lo = previous_n_l;
                            residual_lo = previous_residual;
                            rho_lo = previous_rho;
                            mu_lo = previous_mu;
                            rho_hat_lo = previous_rho_hat;

                            n_l_hi = n_l_candidate;
                            residual_hi = residual_candidate;
                            rho_hi = rho_candidate;
                            mu_hi = mu_candidate;
                            rho_hat_hi = rho_hat_candidate;
                            found_bracket = true;
                            break;
                        }

                        previous_n_l = n_l_candidate;
                        previous_residual = residual_candidate;
                        previous_rho = rho_candidate;
                        previous_mu = mu_candidate;
                        previous_rho_hat = rho_hat_candidate;
                    }

                    if (!found_bracket)
                    {
                        return false;
                    }
                }

                for (unsigned int iteration = 0; iteration < 4 * max_iterations;
                     ++iteration)
                {
                    const auto n_l_mid = 0.5 * (n_l_lo + n_l_hi);
                    double residual_mid = 0.0;
                    double rho_mid = 0.0;
                    double mu_mid = 0.0;
                    double rho_hat_mid = 0.0;

                    if (!evaluate_reduced(n_l_mid, rho_lR_prev_arg,
                                          residual_mid, rho_mid, mu_mid,
                                          rho_hat_mid))
                    {
                        return false;
                    }

                    if (std::abs(residual_mid) < newton_tolerance ||
                        std::abs(n_l_hi - n_l_lo) <
                            newton_tolerance *
                                std::max(1.0, std::abs(n_l_mid)))
                    {
                        n_l_bracketed_out = n_l_mid;
                        rho_lR_bracketed_out = rho_mid;
                        mu_lR_bracketed_out = mu_mid;
                        rho_l_hat_bracketed_out = rho_hat_mid;
                        return true;
                    }

                    if (residual_lo * residual_mid <= 0.0)
                    {
                        n_l_hi = n_l_mid;
                        residual_hi = residual_mid;
                    }
                    else
                    {
                        n_l_lo = n_l_mid;
                        residual_lo = residual_mid;
                    }
                }

                const auto n_l_mid = 0.5 * (n_l_lo + n_l_hi);
                double residual_mid = 0.0;
                double rho_mid = 0.0;
                double mu_mid = 0.0;
                double rho_hat_mid = 0.0;
                if (!evaluate_reduced(n_l_mid, rho_lR_prev_arg, residual_mid,
                                      rho_mid, mu_mid, rho_hat_mid))
                {
                    return false;
                }

                n_l_bracketed_out = n_l_mid;
                rho_lR_bracketed_out = rho_mid;
                mu_lR_bracketed_out = mu_mid;
                rho_l_hat_bracketed_out = rho_hat_mid;
                return true;
            };

        for (unsigned int iteration = 0; iteration < max_iterations;
             ++iteration)
        {
            double residual_1 = 0.0;
            double residual_2 = 0.0;
            double mu_lR_trial = 0.0;
            double rho_l_hat_trial = 0.0;
            evaluate(n_l_trial, rho_lR_trial, residual_1, residual_2,
                     mu_lR_trial, rho_l_hat_trial);

            const auto residual_norm =
                std::max(std::abs(residual_1), std::abs(residual_2));
            if (residual_norm < newton_tolerance)
            {
                n_l_out = n_l_trial;
                rho_lR_out = rho_lR_trial;
                mu_lR_out = mu_lR_trial;
                rho_l_hat_out = rho_l_hat_trial;
                return;
            }

            // Analytical Jacobian (F5a port from native, mirroring base
            // mfront bridge). Total derivatives treat active_nS = 1 - n_l
            // (F2 fix above). dphi_m/dn_l uses MCC's phi_m_from_n_l form,
            // K_phi = 1 - phi_total_trial (not 1 - phi0 — phi evolves under
            // MCC plasticity coupling).
            const auto n_l_jac = std::max(n_l_trial, minimum_n_l);
            const auto rho_lR_jac =
                std::max(rho_lR_trial, rho_LR_ref + minimum_density_gap);
            const auto nS_jac = active_nS_from_nl(n_l_jac);
            const auto one_minus_n_l_jac = std::max(1e-12, 1.0 - n_l_jac);
            const auto phi_m_jac = phi_m_from_n_l(n_l_jac);
            const auto dphi_m_dnl_jac = (1.0 - phi_total_trial) /
                                        (one_minus_n_l_jac * one_minus_n_l_jac);
            const auto alpha_eff_jac =
                alpha_M_effective_from_density(rho_macro_step);
            const auto mu_vdW_jac =
                (micro_potential_sign * hamaker_magnitude * specific_surface *
                 specific_surface * specific_surface / (6.0 * pi)) *
                (nS_jac * nS_jac * nS_jac * rho_SR * rho_SR * rho_SR) /
                (n_l_jac * n_l_jac * n_l_jac * rho_lR_jac);  // J/kg
            const bool aug_active_jac = (vdw_augmentation_prefactor > 0.0 &&
                                         vdw_augmentation_decay_length > 0.0);
            const auto mu_aug_jac =
                aug_active_jac
                    ? micro_potential_sign * vdw_augmentation_prefactor *
                          std::exp(-n_l_jac /
                                   (vdw_augmentation_decay_length * nS_jac *
                                    rho_SR * specific_surface))
                    : 0.0;  // J/kg
            const auto dmu_lR_dnl_jac =
                -3.0 * mu_vdW_jac / (n_l_jac * nS_jac) +
                (aug_active_jac
                     ? -mu_aug_jac /
                           (vdw_augmentation_decay_length * nS_jac *
                            nS_jac * rho_SR * specific_surface)
                     : 0.0);
            const auto dmu_lR_drho_lR_jac = -mu_vdW_jac / rho_lR_jac;
            const auto omega_raw_jac =
                n_l_jac * rho_lR_jac / (nS_jac * rho_SR);
            const auto omega_clamped_jac =
                std::max(omega_raw_jac, minimum_n_l);
            const auto EOS_attr_jac =
                rho_l0 * std::exp(-density_a *
                                  std::pow(omega_clamped_jac, density_b));
            const auto domega_dnl_jac =
                (omega_raw_jac > minimum_n_l)
                    ? rho_lR_jac / (rho_SR * nS_jac * nS_jac)
                    : 0.0;
            const auto domega_drho_lR_jac =
                (omega_raw_jac > minimum_n_l)
                    ? n_l_jac / (nS_jac * rho_SR)
                    : 0.0;
            const auto deos_pref_jac =
                -EOS_attr_jac * density_a * density_b *
                std::pow(omega_clamped_jac, density_b - 1.0);
            const auto drho_eos_dnl_jac =
                deos_pref_jac * domega_dnl_jac;
            const auto drho_eos_drho_lR_jac =
                deos_pref_jac * domega_drho_lR_jac;
            const auto one_minus_deps_v_jac = 1.0 - delta_epsilon_v_arg;
            const auto j11 = dphi_m_dnl_jac * rho_lR_jac * one_minus_deps_v_jac +
                             dt * alpha_eff_jac * dmu_lR_dnl_jac;
            const auto j12 = phi_m_jac * one_minus_deps_v_jac +
                             dt * alpha_eff_jac * dmu_lR_drho_lR_jac;
            const auto j21 = -drho_eos_dnl_jac;
            const auto j22 = 1.0 - drho_eos_drho_lR_jac;

            const auto det = j11 * j22 - j12 * j21;
            if (std::abs(det) < newton_tolerance)
            {
                break;
            }

            const auto delta_n = (-residual_1 * j22 + residual_2 * j12) / det;
            const auto delta_rho =
                (-j11 * residual_2 + j21 * residual_1) / det;

            auto step_scale = 1.0;
            auto accepted = false;

            for (unsigned int line_search = 0; line_search < 8; ++line_search)
            {
                // Clamp to [minimum_n_l, phi0]: n_l cannot exceed total porosity.
                const auto n_candidate =
                    std::clamp(n_l_trial + step_scale * delta_n, minimum_n_l,
                               phi0);
                const auto rho_candidate = std::max(
                    rho_lR_trial + step_scale * delta_rho,
                    rho_LR_ref + minimum_density_gap);

                double residual_1_candidate = 0.0;
                double residual_2_candidate = 0.0;
                double mu_candidate = 0.0;
                double rho_hat_candidate = 0.0;
                evaluate(n_candidate, rho_candidate, residual_1_candidate,
                         residual_2_candidate, mu_candidate, rho_hat_candidate);

                const auto candidate_norm = std::max(
                    std::abs(residual_1_candidate),
                    std::abs(residual_2_candidate));
                if (candidate_norm <
                    residual_norm * (1.0 - 1e-4 * step_scale))
                {
                    n_l_trial = n_candidate;
                    rho_lR_trial = rho_candidate;
                    accepted = true;
                    break;
                }

                step_scale *= 0.5;
            }

            if (!accepted)
            {
                if (solve_microstate_bracketed(n_l_out, rho_lR_out, mu_lR_out,
                                               rho_l_hat_out))
                {
                    return;
                }
                // Saturation-clamped fallback: if residual at phi0 <= 0,
                // physics demands n_l >= phi0 — clamp to ceiling.
                // Matches native n_l = clamp(n_l, floor, phi_ceiling).
                {
                    double res_ceil = 0.0;
                    double rho_ceil = rho_lR_trial;
                    double mu_ceil = 0.0;
                    double rho_hat_ceil = 0.0;
                    evaluate_reduced(phi0, rho_lR_prev_arg, res_ceil, rho_ceil,
                                     mu_ceil, rho_hat_ceil);
                    if (res_ceil <= 0.0)
                    {
                        assign_coupled_state(phi0, rho_ceil);
                        return;
                    }
                }
                fallback_coupled_state();
                return;
            }

            if (std::abs(step_scale * delta_n) <
                    newton_tolerance * std::max(1.0, std::abs(n_l_trial)) &&
                std::abs(step_scale * delta_rho) <
                    newton_tolerance * std::max(1.0, std::abs(rho_lR_trial)))
            {
                double residual_1 = 0.0;
                double residual_2 = 0.0;
                double mu_lR_trial = 0.0;
                double rho_l_hat_trial = 0.0;
                evaluate(n_l_trial, rho_lR_trial, residual_1, residual_2,
                         mu_lR_trial, rho_l_hat_trial);

                if (std::max(std::abs(residual_1), std::abs(residual_2)) <
                    newton_tolerance)
                {
                    n_l_out = n_l_trial;
                    rho_lR_out = rho_lR_trial;
                    mu_lR_out = mu_lR_trial;
                    rho_l_hat_out = rho_l_hat_trial;
                    return;
                }
            }
        }

        if (solve_microstate_bracketed(n_l_out, rho_lR_out, mu_lR_out,
                                       rho_l_hat_out))
        {
            return;
        }
        // Final saturation-clamped fallback (mirrors line-search fallback above).
        {
            double res_ceil = 0.0;
            double rho_ceil = rho_lR_trial;
            double mu_ceil = 0.0;
            double rho_hat_ceil = 0.0;
            evaluate_reduced(phi0, rho_lR_prev_arg, res_ceil, rho_ceil,
                             mu_ceil, rho_hat_ceil);
            if (res_ceil <= 0.0)
            {
                assign_coupled_state(phi0, rho_ceil);
                return;
            }
        }
        fallback_coupled_state();
        return;
    };

    n_l_trial_value = n_l_prev;
    rho_lR_trial_value = rho_lR_prev;
    mu_lR_trial_value = mu_micro_from_state(n_l_prev, rho_lR_prev);
    rho_l_hat_trial_value =
        alpha_M_effective_from_density(rho_lR_prev) *
        (mu_macro_from_pressure(p, rho_lR_prev) - mu_lR_trial_value);
    dn_l_dtrace_eps_trial = 0.0;
    dn_l_dp_trial = 0.0;

    if (!zero_dt)
    {
        solve_microstate(p, delta_epsilon_v, n_l_prev, rho_lR_prev,
                         n_l_trial_value, rho_lR_trial_value,
                         mu_lR_trial_value, rho_l_hat_trial_value);

        if (!use_scalar_microstate_storage)
        {
            // F5b port (vector-mode analytical outer tangent).
            // Replaces FD on solve_microstate w.r.t. eps_v and p with
            // implicit-function-theorem applied to the converged microstate.
            // Same Jacobian shape as the vector-mode inner Newton (F5a above);
            // re-evaluated at converged (n_l_trial_value, rho_lR_trial_value).
            //
            // External-variable derivatives of the residuals:
            //   ∂r1/∂eps_v = -phi_m*rho_lR,            ∂r2/∂eps_v = 0
            //   ∂r1/∂p     = -dt*alpha_eff/rho_macro,  ∂r2/∂p     = 0
            // Cramer: dn_l/dx = (-∂r1/∂x * J22 + ∂r2/∂x * J12) / det(J)
            const auto rho_macro_jt =
                std::max(rho_lR_prev, rho_LR_ref + minimum_density_gap);
            const auto n_l_jt = std::max(n_l_trial_value, minimum_n_l);
            const auto rho_lR_jt =
                std::max(rho_lR_trial_value, rho_LR_ref + minimum_density_gap);
            const auto nS_jt = active_nS_from_nl(n_l_jt);
            const auto one_minus_n_l_jt = std::max(1e-12, 1.0 - n_l_jt);
            const auto phi_m_jt = phi_m_from_n_l(n_l_jt);
            const auto dphi_m_dnl_jt = (1.0 - phi_total_trial) /
                                       (one_minus_n_l_jt * one_minus_n_l_jt);
            const auto alpha_eff_jt =
                alpha_M_effective_from_density(rho_macro_jt);
            const auto mu_vdW_jt =
                (micro_potential_sign * hamaker_magnitude * specific_surface *
                 specific_surface * specific_surface / (6.0 * pi)) *
                (nS_jt * nS_jt * nS_jt * rho_SR * rho_SR * rho_SR) /
                (n_l_jt * n_l_jt * n_l_jt * rho_lR_jt);
            const bool aug_active_jt = (vdw_augmentation_prefactor > 0.0 &&
                                        vdw_augmentation_decay_length > 0.0);
            const auto mu_aug_jt =
                aug_active_jt
                    ? micro_potential_sign * vdw_augmentation_prefactor *
                          std::exp(-n_l_jt /
                                   (vdw_augmentation_decay_length * nS_jt *
                                    rho_SR * specific_surface))
                    : 0.0;
            const auto dmu_lR_dnl_jt =
                -3.0 * mu_vdW_jt / (n_l_jt * nS_jt) +
                (aug_active_jt
                     ? -mu_aug_jt /
                           (vdw_augmentation_decay_length * nS_jt *
                            nS_jt * rho_SR * specific_surface)
                     : 0.0);
            const auto dmu_lR_drho_lR_jt = -mu_vdW_jt / rho_lR_jt;
            const auto omega_raw_jt =
                n_l_jt * rho_lR_jt / (nS_jt * rho_SR);
            const auto omega_clamped_jt =
                std::max(omega_raw_jt, minimum_n_l);
            const auto EOS_attr_jt =
                rho_l0 * std::exp(-density_a *
                                  std::pow(omega_clamped_jt, density_b));
            const auto domega_dnl_jt =
                (omega_raw_jt > minimum_n_l)
                    ? rho_lR_jt / (rho_SR * nS_jt * nS_jt)
                    : 0.0;
            const auto domega_drho_lR_jt =
                (omega_raw_jt > minimum_n_l)
                    ? n_l_jt / (nS_jt * rho_SR)
                    : 0.0;
            const auto deos_pref_jt =
                -EOS_attr_jt * density_a * density_b *
                std::pow(omega_clamped_jt, density_b - 1.0);
            const auto drho_eos_dnl_jt =
                deos_pref_jt * domega_dnl_jt;
            const auto drho_eos_drho_lR_jt =
                deos_pref_jt * domega_drho_lR_jt;
            const auto one_minus_deps_v_jt = 1.0 - delta_epsilon_v;
            const auto j11_jt =
                dphi_m_dnl_jt * rho_lR_jt * one_minus_deps_v_jt +
                dt * alpha_eff_jt * dmu_lR_dnl_jt;
            const auto j12_jt = phi_m_jt * one_minus_deps_v_jt +
                                dt * alpha_eff_jt * dmu_lR_drho_lR_jt;
            const auto j21_jt = -drho_eos_dnl_jt;
            const auto j22_jt = 1.0 - drho_eos_drho_lR_jt;
            const auto det_jt = j11_jt * j22_jt - j12_jt * j21_jt;
            tfel::raise_if(
                std::abs(det_jt) < 1e-24,
                "DSMMicroMacro_MCC outer-tangent Jacobian became singular.");

            dn_l_dtrace_eps_trial =
                phi_m_jt * rho_lR_jt * j22_jt / det_jt;

            if (p <= -pressure_tolerance)
            {
                dn_l_dp_trial =
                    dt * alpha_eff_jt * j22_jt / (rho_macro_jt * det_jt);
            }
        }
        else
        {
            // Scalar-storage path: rho_lR is held fixed at the macro density,
            // so the inner solve is 1D in n_l. The F5b port covers vector
            // mode only; scalar mode retains FD on solve_microstate. The
            // analytical 1D IFT for scalar mode is a worthwhile follow-up
            // (mu_lR depends only on n_l with rho_lR = rho_scalar) but is
            // out of the current port scope.
            const auto deps_v_fd =
                std::max(1e-8, std::abs(delta_epsilon_v) * 1e-6 + 1e-8);
            double n_l_eps_plus = n_l_prev;
            double rho_lR_eps_plus = rho_lR_prev;
            double mu_lR_eps_plus = mu_lR_trial_value;
            double rho_l_hat_eps_plus = rho_l_hat_trial_value;
            double n_l_eps_minus = n_l_prev;
            double rho_lR_eps_minus = rho_lR_prev;
            double mu_lR_eps_minus = mu_lR_trial_value;
            double rho_l_hat_eps_minus = rho_l_hat_trial_value;

            solve_microstate(p, delta_epsilon_v + deps_v_fd, n_l_prev,
                             rho_lR_prev, n_l_eps_plus, rho_lR_eps_plus,
                             mu_lR_eps_plus, rho_l_hat_eps_plus);
            solve_microstate(p, delta_epsilon_v - deps_v_fd, n_l_prev,
                             rho_lR_prev, n_l_eps_minus, rho_lR_eps_minus,
                             mu_lR_eps_minus, rho_l_hat_eps_minus);

            dn_l_dtrace_eps_trial =
                (n_l_eps_plus - n_l_eps_minus) / (2.0 * deps_v_fd);

            if (p <= -pressure_tolerance)
            {
                const auto dp_fd = std::max(1e-6, std::abs(p) * 1e-6);
                double n_l_plus = n_l_prev;
                double rho_lR_plus = rho_lR_prev;
                double mu_lR_plus = mu_lR_trial_value;
                double rho_l_hat_plus = rho_l_hat_trial_value;
                double n_l_minus = n_l_prev;
                double rho_lR_minus = rho_lR_prev;
                double mu_lR_minus = mu_lR_trial_value;
                double rho_l_hat_minus = rho_l_hat_trial_value;

                solve_microstate(p + dp_fd, delta_epsilon_v, n_l_prev,
                                 rho_lR_prev, n_l_plus, rho_lR_plus,
                                 mu_lR_plus, rho_l_hat_plus);
                solve_microstate(p - dp_fd, delta_epsilon_v, n_l_prev,
                                 rho_lR_prev, n_l_minus, rho_lR_minus,
                                 mu_lR_minus, rho_l_hat_minus);

                dn_l_dp_trial = (n_l_plus - n_l_minus) / (2.0 * dp_fd);
            }
        }
    }

    if (use_scalar_microstate_storage)
    {
        n_l_trial_value =
            std::clamp(n_l_trial_value, minimum_n_l, n_l_upper_bound);
        rho_lR_trial_value = macro_density_from_state(rho_lR_trial_value);
        const auto mu_LR_final =
            mu_macro_from_pressure(p, rho_lR_trial_value);
        const auto alpha_M_effective_final =
            alpha_M_effective_from_density(rho_lR_trial_value);
        mu_lR_trial_value =
            mu_micro_from_state(n_l_trial_value, rho_lR_trial_value);
        rho_l_hat_trial_value = alpha_M_effective_final *
                                (mu_LR_final - mu_lR_trial_value);
    }

    phi_m_trial_value = phi_m_from_n_l(n_l_trial_value);
    phi_M_trial_value = std::clamp(phi_total_trial - phi_m_trial_value, 0.0,
                                   phi_total_trial);
    epsilon_sw_increment_trial =
        swelling_slope * (phi_m_trial_value - phi_m_prev);
}

@ComputeThermodynamicForces
{
    σ = σ₀ + θ * ∂σ∕∂εᵉˡ * Δεᵉˡ;
}

@Integrator
{
    constexpr const auto Pr4 = Stensor4::K();
    const auto the = vʳ / (la - ka);

    if (withinElasticRange)
    {
        fεᵉˡ -= Δεᵗᵒ;
        return true;
    }

    const auto epsr = strain(1.e-12);
    const auto s = deviator(σ);
    const auto q = sqrt(1.5 * s | s);
    const auto p = -trace(σ) / 3.0 + pamb;

    const auto rpc_new = rpc + θ * Δrpc;
    const auto pc_new = rpc_new * young;

    const auto f = q * q + M² * p * (p - pc_new);
    const auto ∂f∕∂p = M² * (2.0 * p - pc_new);
    const auto ∂f∕∂σ = eval(3.0 * s - ∂f∕∂p * I₂ / 3.0);
    auto norm = sqrt(6.0 * q * q + ∂f∕∂p * ∂f∕∂p / 3.0);
    norm = max(norm, epsr * young);
    const auto n = ∂f∕∂σ / norm;
    const auto ntr = -∂f∕∂p / norm;

    const auto Δεᵖˡ = eval(ΔΛₚ * n);
    const auto Δεᵖˡᵛ = trace(Δεᵖˡ);

    const auto fchar = pc_char * young;

    fεᵉˡ = Δεᵉˡ + Δεᵖˡ - Δεᵗᵒ;
    fΛₚ = f / fchar;
    frpc = Δrpc + Δεᵖˡᵛ * the * (rpc_new - rpc_min);

    const auto ∂norm∕∂σ =
        (9.0 * s - 2.0 * M² / 9.0 * ∂f∕∂p * I₂) / norm;
    const auto ∂n∕∂Δεᵉˡ =
        (3.0 * Pr4 + 2.0 * M² / 9.0 * (I₂ ⊗ I₂) - (n ⊗ ∂norm∕∂σ)) / norm *
        ∂σ∕∂εᵉˡ * θ;
    const auto ∂n∕∂Δrpc =
        (I₂ + ∂f∕∂p * n / norm) * M² / (3.0 * norm) * θ * young;
    const auto ∂frpc∕∂Δεᵖˡᵛ = the * (rpc_new - rpc_min);

    ∂fεᵉˡ∕∂Δεᵉˡ += ΔΛₚ * ∂n∕∂Δεᵉˡ;
    ∂fεᵉˡ∕∂ΔΛₚ = n;
    ∂fεᵉˡ∕∂Δrpc = ΔΛₚ * ∂n∕∂Δrpc;

    ∂fΛₚ∕∂Δεᵉˡ = (∂f∕∂σ | ∂σ∕∂εᵉˡ) * θ / fchar;
    ∂fΛₚ∕∂ΔΛₚ = strain(0);
    ∂fΛₚ∕∂Δrpc = -M² * p * θ / fchar * young;

    ∂frpc∕∂ΔΛₚ = ∂frpc∕∂Δεᵖˡᵛ * ntr;
    ∂frpc∕∂Δεᵉˡ = ∂frpc∕∂Δεᵖˡᵛ * ΔΛₚ * (I₂ | ∂n∕∂Δεᵉˡ);
    ∂frpc∕∂Δrpc =
        1.0 + Δεᵖˡᵛ * the * θ + ∂frpc∕∂Δεᵖˡᵛ * ΔΛₚ * trace(∂n∕∂Δrpc);
}

@ComputeFinalThermodynamicForces
{
    σ = σ₀ + ∂σ∕∂εᵉˡ * Δεᵉˡ - K * epsilon_sw_increment_trial * I₂;
}

@UpdateAuxiliaryStateVariables
{
    pc += Δrpc * young;
    εᵛₚₗ += trace(Δεᵗᵒ - Δεᵉˡ);
    vʳ *= exp(trace(Δεᵗᵒ));

    n_l = n_l_trial_value;
    rho_lR = rho_lR_trial_value;
    epsilon_sw += epsilon_sw_increment_trial;
    phi_m = phi_m_trial_value;
    phi_M = phi_M_trial_value;
    phi_value = phi_m + phi_M;
    n_S_value = 1.0 - phi_value;
    n_L_value = phi_M * macro_support_saturation_trial;
    rho_LR_value = rho_lR;
    // F2 fix: omega_l = m_water/m_solid uses the AGGREGATE solid fraction
    // (1 - n_l), not the REV solid fraction n_S_value = 1 - phi. The aux
    // state n_S_value reports 1 - phi as a separate, valid quantity; it is
    // NOT the denominator of the gravimetric water content. Pre-fix this
    // line used n_S_value, giving omega_l_code = omega_l_true * (1-n_l)/(1-phi)
    // — state-dependent error (same as the bug fixed inside the @Integrator
    // microstate solve). See [[ogs_rm_dsm_potential_physics]].
    {
        const auto aggregate_nS_final = std::max(1e-14, 1.0 - n_l);
        omega_l_value = n_l * rho_lR / (aggregate_nS_final * rho_SR);
    }
    mu_lR_value = mu_lR_trial_value;
    rho_l_hat_value = rho_l_hat_trial_value;
    delta_epsilon_sw_value = epsilon_sw_increment_trial;
    sigma_S_value = -K * epsilon_sw * I₂;
}

@AdditionalConvergenceChecks
{
    if (converged)
    {
        if (!withinElasticRange)
        {
            if (ΔΛₚ < 0)
            {
                converged = false;
                withinElasticRange = true;
            }
        }
    }
}

@TangentOperator
{
    const auto ∂Sᴸ∕∂pᶜᵃᵖ = [&](const auto pᶜᵃᵖ) {
        return (1.0 - Sᴳʳ - Sᴸʳ) *
               (Sᴸ < (1.0 - Sᴳʳ) && Sᴸ > Sᴸʳ
                    ? -mⱽᴳ / (pᵇ * (1.0 - mⱽᴳ)) *
                          std::pow(std::pow(std::max(pᶜᵃᵖ, 0.0) / pᵇ,
                                            1.0 / (1.0 - mⱽᴳ)) +
                                       1.0,
                                   -mⱽᴳ - 1.0) *
                          std::pow(std::max(pᶜᵃᵖ, 0.0) / pᵇ,
                                   1.0 / (1.0 - mⱽᴳ) - 1.0)
                    : 0.0);
    };

    const auto ∂Sᴸ_dsm_micromacro∕∂p = [&](const auto p_arg) {
        if (p_arg >= -1e-12)
        {
            return 0.0;
        }

        const auto inv_p = 1.0 / p_arg;
        const auto exp_term =
            std::exp(-tuller_capillary_prefactor * inv_p * inv_p);
        return -2.0 * tuller_capillary_prefactor * exp_term * inv_p * inv_p *
               inv_p;
    };

    ∂σ∕∂Δpᴸᴿ = -(K * swelling_slope * dn_l_dp_trial) * I₂;
    ∂Sᴸ∕∂Δεᵗᵒ = 0.0 * I₂;
    ∂Sᴸ∕∂Δpᴸᴿ = use_macro_saturation_law
                     ? ∂Sᴸ_dsm_micromacro∕∂p(pᴸᴿ + Δpᴸᴿ)
                     : -∂Sᴸ∕∂pᶜᵃᵖ(-(pᴸᴿ + Δpᴸᴿ));

    if ((smt == ELASTIC) || (smt == SECANTOPERATOR))
    {
        ∂σ∕∂Δεᵗᵒ = ∂σ∕∂εᵉˡ;
    }
    else if (smt == CONSISTENTTANGENTOPERATOR)
    {
        Stensor4 Je;
        getPartialJacobianInvert(Je);
        ∂σ∕∂Δεᵗᵒ = ∂σ∕∂εᵉˡ * Je;
    }
    else
    {
        return false;
    }

    ∂σ∕∂Δεᵗᵒ = ∂σ∕∂Δεᵗᵒ -
                (K * swelling_slope * dn_l_dtrace_eps_trial) * (I₂ ⊗ I₂);
}
